*Heading
** Job name: Test_run Model name: Model-1
** Generated by: Abaqus/CAE Student Edition 2018
*Preprint, echo=NO, model=NO, history=NO, contact=NO
**
** PARTS
**
*Part, name=Orphan_mesh
*End Part
**
**
** ASSEMBLY
**
*Assembly, name=Assembly
**
*Instance, name=Orphan_Mesh_Assembly, part=Orphan_mesh
*Node
      1,           0.,           0.
      2,           2.,           0.
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*Element, type=CPS4
  1,   1,   2,  18,  17
  2,   2,   3,  19,  18
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*Elset, elset=Cut
  52,  53,  54,  65,  66,  67
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*Elset, elset=Inside
   1,   2,   3,   4,   5,   6
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*Elset, elset=Outside
  68,  81,  82,  83,  84,  85
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** Section: Inside_Elements
*Solid Section, elset=Inside, material=Alpha-1
1.,
** Section: Cut_Elements
*Solid Section, elset=Cut, material=Alpha-0
1.,
** Section: Outside_Elements
*Solid Section, elset=Outside, material=Alpha-0
1.,
*End Instance
**
*Nset, nset=BC_X_dirichlet, instance=Orphan_Mesh_Assembly, generate
  1,  16,   1
*Nset, nset=BC_Y_Nuemman, instance=Orphan_Mesh_Assembly, generate
 241,  256,    1
*Nset, nset=BC_Y_dirichlet, instance=Orphan_Mesh_Assembly, generate
   1,  241,   16
*Elset, elset=Elem_BC_Y_Nuemman, instance=Orphan_Mesh_Assembly, generate
 211,  225,    1
*Elset, elset=_Loading_edge_S3, internal, instance=Orphan_Mesh_Assembly, generate
 211,  225,    1
*Surface, type=ELEMENT, name=Loading_edge
_Loading_edge_S3, S3
*End Assembly
**
** MATERIALS
**
*Material, name=Alpha-0
*Elastic
 2e-05, 0.3
*Material, name=Alpha-1
*Elastic
200000., 0.3
** ----------------------------------------------------------------
**
** STEP: Static_load_case
**
*Step, name=Static_load_case, nlgeom=NO
*Static
1., 1., 1e-05, 1.
**
** BOUNDARY CONDITIONS
**
** Name: X_disp_fixed Type: Displacement/Rotation
*Boundary
BC_Y_dirichlet, 1, 1
** Name: Y_disp_fixed Type: Displacement/Rotation
*Boundary
BC_X_dirichlet, 2, 2
**
** LOADS
**
** Name: Surface_traction   Type: Surface traction
*Dsload
Loading_edge, TRVEC, 100., 0., 1., 0.
**
** OUTPUT REQUESTS
**
*Restart, write, frequency=0
**
** FIELD OUTPUT: F-Output-1
**
*Output, field, variable=PRESELECT
**
** HISTORY OUTPUT: H-Output-1
**
*Output, history, variable=PRESELECT
*End Step
